// SBML level 2 version 4

model SIR()

  // Compartments:
  compartment cell = 1;

  // Species:
  species Susceptible in cell = 20/cell;  // substance in item
  species Infected in cell = 12/cell;  // substance in item
  species Recovered in cell = 3/cell;  // substance in item

  // Parameters:
  beta = 0.01 per_item_second;
  gamma = 0.2 per_second;
  time_delay = 0.1 per_second;

  // Reactions:
  infection: Susceptible + Infected => 2 Infected; beta*Susceptible^1*Infected^1;
  recovery: Infected => Recovered; gamma*Infected^1;

  // Events:
  vaccination: at (Infected > 10): Susceptible = Susceptible - 5, Recovered = Recovered + 5;

  // Unit definitions:
  unit per_second = 1 / second;
  unit per_item_second = 1 / (item * second);
end
